OpenVSP model (file version 4), 4 components.
Geometry view with OpenVSP parameter names; values to 6 digits, angles in degrees, lengths in the model's unit.
Overall bounding box: X_Min=0 X_Len=46.2144 Y_Min=-17.2065 Y_Len=34.4129 Z_Min=-1.89 Z_Len=7.79462

Wing "MainWing"
  location (X Y Z) 17 0 -1, rotation 0 2 0
  symmetric about XZ
  bounding box size 14.2007 34.4129 1.08413
  totals: TotalSpan=34.4129 TotalProjectedSpan=34.4129 TotalChord=4.58839 TotalArea=157.9
  root: chord 6.85078, twist 0, NACA 4-series Camber=0.02 CamberLoc=0.4 ThickChord=0.15
  sections:
    n  Span     Root_Chord  Tip_Chord  Area   Sweep  Sweep_Location  Dihedral  Twist  Twist_Location  tip airfoil
    1  17.2065  6.85078     2.326      78.95  32     0.25            0         0      0.25            NACA 4-series Camber=0.02 CamberLoc=0.4 ThickChord=0.1

Wing "HT"
  location (X Y Z) 39.5 0 5.7, rotation 0 0 0
  symmetric about XZ
  bounding box size 6.7148 11.371 0.587176
  totals: TotalSpan=11.371 TotalProjectedSpan=11.371 TotalChord=3.33217 TotalArea=37.89
  root: chord 4.82924, twist 0, NACA 4-series Camber=0.02 CamberLoc=0.4 Invert=1 ThickChord=0.12
  sections:
    n  Span     Root_Chord  Tip_Chord  Area    Sweep  Sweep_Location  Dihedral  Twist  Twist_Location  tip airfoil
    1  5.68548  4.82924     1.83511    18.945  36     0.25            0         0      0.25            as above

Wing "VT"
  location (X Y Z) 31.717 0 1.3, rotation 90 0 0
  bounding box size 12.85 0.807982 4.6008
  totals: TotalSpan=4.6008 TotalProjectedSpan=4.6008 TotalChord=7.18875 TotalArea=33.074
  root: chord 8.07725, twist 0, NACA 4-series Camber=0 CamberLoc=0.2 ThickChord=0.1
  sections:
    n  Span    Root_Chord  Tip_Chord  Area    Sweep  Sweep_Location  Dihedral  Twist  Twist_Location  tip airfoil
    1  4.6008  8.07725     6.30025    33.074  53     0.25            0         0      0.25            as above

Fuselage "Fuselage"
  location (X Y Z) 0 0 0, rotation 0 0 0
  bounding box size 41.514 3.78 3.78
  Design: Length=41.514
  cross sections:
    n  XLocPercent  YLocPercent  ZLocPercent  shape
    0  0            0            0            point
    1  0.25         0            0            ellipse Ellipse_Height=3.78 Ellipse_Width=3.78
    2  0.5          0            0            as above
    3  0.75         0            0            as above
    4  1            0            0            point

VSPAERO settings: Sref=157.9 bref=34.4129 cref=4.58839 Xcg=0 Ycg=0 Zcg=0 AlphaStart=-10 AlphaEnd=10 AlphaNpts=2 BetaStart=0 BetaEnd=0 BetaNpts=1 MachStart=0.5 MachEnd=0 MachNpts=1 ReCref=1e+07 Vinf=100 Rho=0.002377
